*Heading
** Job name: Torsion1 Model name: Model-1
** Generated by: Abaqus/CAE 2021
*Preprint, echo=NO, model=NO, history=NO, contact=NO
**
** PARTS
**
*Part, name="fus tim v1 v1"
*Node
      1,   36.1573143,          40.,         500.
      2,   36.2219048,          40.,         400.
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*Element, type=C3D8R
 1,   8,  76, 765,  97,   1,  33, 701,  72
 2,  76,  75, 766, 765,  33,  34, 702, 701
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*Nset, nset=Set-7, generate
    1,  7584,     1
*Elset, elset=Set-7, generate
    1,  3744,     1
*Orientation, name=Ori-1
          0.,           1.,           0.,           0.,           0.,           1.
3, 90.
** Region: (Section-1:Set-7), (Material Orientation:Picked)
*Elset, elset=_I1, internal
    1,    2,    3,    4,    5,    6
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** Section: Section-1
*Solid Section, elset=_I1, composite, orientation=Ori-1, layup=Fuse Layup, symmetric
1., 1, "Carbon Fiber AS4D 9340", 0., 1
1., 1, "Carbon Fiber AS4D 9340", 90., 2
*Orientation, name=Ori-2
          0.,           1.,           0.,           0.,           0.,           1.
3, 90.
** Region: (Section-1:Set-7), (Material Orientation:Picked)
*Elset, elset=_I2, internal
   86,   87,   88,   89,   90,   91
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** Section: Section-1
*Solid Section, elset=_I2, composite, orientation=Ori-2, layup=Fuse Layup, symmetric
1., 1, "Carbon Fiber AS4D 9340", 0., 1
1., 1, "Carbon Fiber AS4D 9340", 90., 2
*End Part
**
**
** ASSEMBLY
**
*Assembly, name=Assembly
**
*Instance, name="fus tim v1 v1-1", part="fus tim v1 v1"
*End Instance
**
*Node
      1,           0.,    39.007988,    1549.8739
*Nset, nset=Set-1, instance="fus tim v1 v1-1"
    5,    8,   11,   12,   19,   26
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*Elset, elset=Set-1, instance="fus tim v1 v1-1", generate
 1443,  1512,     1
*Nset, nset=Set-4
 1,
*Nset, nset=p_Set-2, instance="fus tim v1 v1-1"
  15,  18, 242, 243, 244, 245
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*Elset, elset=p_Set-2, instance="fus tim v1 v1-1"
 1419, 1420, 1421, 1422, 1423, 1424
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*Nset, nset=_PickedSet7, internal
 1,
** Constraint: Constraint-1
*Rigid Body, ref node=_PickedSet7, pin nset=p_Set-2
*End Assembly
**
** MATERIALS
**
** Elastic and failure data from Barbero
*Material, name="Carbon Fiber AS4D 9340"
*Elastic, type=ENGINEERING CONSTANTS
133000., 7710., 7710., 0.301, 0.301, 0.396, 4310., 4310.
 2760.,
*Fail Stress
1830.,-1096.,   57., -228.,   71.,   -1.,    0.
** ----------------------------------------------------------------
**
** STEP: Step-1
**
*Step, name=Step-1, nlgeom=NO
*Static
1., 1., 1e-05, 1.
**
** BOUNDARY CONDITIONS
**
** Name: BC-1 Type: Displacement/Rotation
*Boundary
Set-1, 1, 1
Set-1, 2, 2
Set-1, 3, 3
Set-1, 4, 4
Set-1, 5, 5
Set-1, 6, 6
**
** LOADS
**
** Name: Load-1   Type: Moment
*Cload
Set-4, 6, 1000.
**
** OUTPUT REQUESTS
**
*Restart, write, frequency=0
**
** FIELD OUTPUT: F-Output-1
**
*Output, field
*Node Output
CF, RF, U, UR
*Element Output, directions=YES
LE, PE, PEEQ, PEMAG, S
*Contact Output
CDISP, CSTRESS
**
** HISTORY OUTPUT: H-Output-1
**
*Output, history, variable=PRESELECT
*End Step
